# STRASSEN SIMD
amdahl(n, p) := 1/((1 - p) + p/n)
vn := [1; 2; 3; 4]
vy := [12.35/12.35; 12.35/6.62; 12.35/4.88; 12.35/4.08] = [1; 1.86556; 2.53074; 3.02696]
12.34 S = 12.34 1/Ω
amdahl_n(n, p) := d/dn(amdahl(n, p))
12.35/4.24 = 2.91274
amdahl_p(n, p) := d/dp(amdahl(n, p))
F(n, p) := [amdahl(n, p); amdahl_p(n, p)]
amdahl(1000, .99) = 90.9918
p_0 := genfit(vn, vy, [.95], F) = 0.8979
amdahl(100000000000000000000000000, p_0) = 9.79429
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# REKURSIV SIMD
vn := [1; 2; 3; 4]
vy := [17.23/17.23; 17.23/8.71; 17.23/5.93; 17.23/4.63] = [1; 1.97819; 2.90556; 3.72138]
17.23/5.069 = 3.39909
amdahl(1000, .99) = 90.9918
p_0 := genfit(vn, vy, [.8], F) = 0.977244
amdahl(1000000, p_0) = 43.9429
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# ITERATIV TILED SIMD
vn := [1; 2; 3; 4]
vy := [15.12/15.12; 15.12/7.58; 15.12/5.32; 15.12/4.03]
15.12/3.97 = 3.80856
amdahl(1000, .99) = 90.9918
p_0 := genfit(vn, vy, [.8], F) = 0.97727
amdahl(1000000000000000000000000000000, p_0) = 43.9955
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# NAIV ROW/COLUMN
vn := [1; 2; 3; 4]
vy := [□; □; □; □]  # error: This placeholder is empty.
125.54/64.04 = 1.96034
125.54/44.31 = 2.83322
125.54/33.83 = 3.71091
125.54/24.94 = 5.03368
amdahl(1000, .99) = 90.9918
p_0 := genfit(vn, vy, [.8], F) = 0.97727
amdahl(100, p_0) = 30.767
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